# OpenSim document version 20302
ControlSet Control Set:
  defaults: ControlLinear default: is_model_control=true extrapolate=true default_min=0.001 default_max=1
      filter_on=false use_steps=true kp=100 kv=20
  ControlLinear [values shared by the 6 below unless stated]: is_model_control=true extrapolate=true default_min=0.001
      default_max=1 filter_on=false use_steps=true kp=100 kv=20
  ControlLinear TRIlong.excitation
  ControlLinear TRIlat.excitation
  ControlLinear TRImed.excitation
  ControlLinear BIClong.excitation
  ControlLinear BICshort.excitation
  ControlLinear BRA.excitation
