# OpenSim document version 40000
ForwardTool FWD_arm26:
  model_file: osim_arm26.osim
  replace_force_set: false
  force_set_files: xml_CMC_Reserve_Actuators.xml
  output_precision: 8
  initial_time: 0.03
  final_time: 1
  solve_for_equilibrium_for_auxiliary_states: false
  maximum_number_of_integrator_steps: 20000
  maximum_integrator_step_size: 1
  minimum_integrator_step_size: 1e-8
  integrator_error_tolerance: 1e-5
  use_specified_dt: false
  ControllerSet Controllers:
    ControlSetController
